ORIGIN := 1
# Провести исследование функции:
Y(x) := (x^2 - 5*x + 6*e^(-x^2))/(8 + sqrt(x^4))^3
# 1. Построить фрагмент графика функции для x∈ [-8;8] и y∈ [-15;10].
# Нанести сетку.
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# 2. Найти корни уравнения: Y(x) = 0.
#
# 1) Снять корни q1, q2, q3  с помощью трассировщика с графика.
# корни с графика:
q1 := 0.78
q2 := 4.984
q3 := □  # error: Пустой местозаполнитель.
# 2) Найти корни с помощью процедуры solve и блока Given Find.
# Результат вывести с точностью 20 и 10 знаков соответственно.
# Создать вектор-столбец Q точных корней (из solve).
u := 0.5
Given
Y(u) == 0
Find(u) = 0.776923
u := q2
Given
Y(u) == 0
Find(u) = 5
root(Y(u), u) = 5
# 3. Найти и изобразить на графике асимптоты функции.
# Найдём асимптоты.
# 1) Горизонтальная асимптота есть
limit(Y(x), x → ∞) → 0
limit(Y(x), x → -∞) → 0
1
# 2) Наклонные асимптоты  As(x) = ax + b :
a := limit(Y(x)/x, x → ∞) → 0
b := limit(Y(x) - a*x, x → ∞) → 0
As(x) := a*x + b
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Y(x) := (x^2 - 5*x + 6*e^(-x^2))/(8 + sqrt(x^4))^3
# 4. Найти локальные экстремумы функции.
# Находим первую производную:
P1(x) := d/dx(Y(x)) factor → -(36*x^3*e^(-x^2) + 12*x^5*e^(-x^2) - 25*x^4 + 4*x^5 - 16*x*sqrt(x^4) + 40*sqrt(x^4) + 96*x*e^(-x^2)*sqrt(x^4))/(2048*x^4 + 32*x^8 + 4096*sqrt(x^4) + 384*(x^4)^(3/2) + (x^4)^(5/2))
D1(x) := d/dx(Y(x)) → -(12*x*e^(-x^2) - 2*x + 5)/(sqrt(x^4) + 8)^3 - 6*x^3*(6*e^(-x^2) - 5*x + x^2)/((sqrt(x^4) + 8)^4*sqrt(x^4))
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# График производной Р1(х):
u := -0.5
Given
P1(u) == 0
Find(u) = -0.36105
u := 1
Given
P1(u) == 0
Find(u) = 1.48625
u := 6
Given
P1(u) == 0
Find(u) = 6.62591
xmax := -0.361049948717
xmin := 1.48624603698
xmax2 := 6.62591406179
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limit(P1(x), x → ∞) → 0
limit(P1(x), x → 1000) float, 20 → -3.9748568430546690823e-15
limit(P1(x), x → 1000000) float, 20 → -3.99997499985600084e-30
D2(x) := d^2/dx^2(Y(x)) → (24*x^2*e^(-x^2) - 12*e^(-x^2) + 2)/(sqrt(x^4) + 8)^3 + 48*x^2*(6*e^(-x^2) - 5*x + x^2)/(sqrt(x^4) + 8)^5 + 12*x^3*(12*x*e^(-x^2) - 2*x + 5)/((sqrt(x^4) + 8)^4*sqrt(x^4)) - 18*x^2*(6*e^(-x^2) - 5*x + x^2)/((sqrt(x^4) + 8)^4*sqrt(x^4)) + 12*x^6*(6*e^(-x^2) - 5*x + x^2)/((sqrt(x^4) + 8)^4*(x^4)^(3/2))
P2(x) := d/dx(P1(x)) factor → 2*(172032*x^8*e^(-x^2) - 73728*x^6*e^(-x^2) + 266496*x^10*e^(-x^2) + 23808*x^12*e^(-x^2) + 7806*x^14*e^(-x^2) + 66*x^16*e^(-x^2) + 12*x^18*e^(-x^2) + 30720*x^3*(x^4)^(3/2) + 160*x^3*(x^4)^(5/2) + 16384*x^8*sqrt(x^4) - 3200*x^7*(x^4)^(3/2) - 320*x^8*(x^4)^(3/2) + 1600*x^11*sqrt(x^4) + 512*x^12*sqrt(x^4) + 184320*x^7 - 40960*x^8 - 5760*x^11 - 512*x^12 - 75*x^15 + 10*x^16 - 196608*e^(-x^2)*(x^4)^(3/2) + 67584*e^(-x^2)*(x^4)^(5/2) + 336*e^(-x^2)*(x^4)^(7/2) + 32768*(x^4)^(3/2) - 29696*(x^4)^(5/2) - 56*(x^4)^(7/2) + 282624*x^2*e^(-x^2)*(x^4)^(3/2) + 36864*x^2*e^(-x^2)*(x^4)^(5/2) + 147456*x^6*e^(-x^2)*sqrt(x^4) + 96*x^2*e^(-x^2)*(x^4)^(7/2) + 24576*x^6*e^(-x^2)*(x^4)^(3/2) + 49152*x^8*e^(-x^2)*sqrt(x^4) + 192*x^8*e^(-x^2)*(x^4)^(3/2) + 2880*x^10*e^(-x^2)*sqrt(x^4) + 1536*x^12*e^(-x^2)*sqrt(x^4) + 384*x^14*e^(-x^2)*sqrt(x^4))/(131072*x^8*(x^4)^(3/2) + 1024*x^16*sqrt(x^4) + 16777216*x^8 + 1835008*x^12 + 28672*x^16 + 64*x^20 + 16777216*(x^4)^(3/2) + 7340032*(x^4)^(5/2) + 155648*(x^4)^(7/2) + 768*(x^4)^(9/2) + (x^4)^(11/2))
# 5. Найти точки перегиба функции Y(x).
# Находим вторую производную:
u := -2.5
Given
P2(u) == 0
Find(u) = -2.36451
u := -1.5
Given
P2(u) == 0
Find(u) = -1.53626  # Tочки перегиба:
u := -1
Given
P2(u) == 0
Find(u) = -0.807807
p1 := -2.36450707449
p2 := -1.53626017871
p3 := -0.807806937073
u := 0.4
Given
P2(u) == 0
Find(u) = 0.44781
u := 2
Given
P2(u) == 0
Find(u) = 2.10187
p4 := 0.447809710853
p5 := 2.10187366459
p6 := 8.22087287315
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u := 7.5
Given
P2(u) == 0
Find(u) = 8.22087
# График производной Р2(х):
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# Δ(х) -  разность между функцией и её асимптотой:
Δ(x) := Y(x) - As(x)
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limit(P2(x), x → ∞) → 0
limit(P2(x), x → 1000) float, 20 → 1.9848998747474640189e-17
limit(P2(x), x → 1000000) float, 20 → 1.999984999899200672e-35
limit(P2(x), x → -1000000) float, 20 → 2.000014999899199328e-35
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p6 = 8.22087  # - точка перегиба
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limit(P2(x), x → ∞) → 0
δ := 0.001
Y(p6 - δ) = 6.13365e-5
Y(p6) = 6.1323e-5
Y(p6 + δ) = 6.13095e-5
